// SBML level 2 version 3

model temp()

  // Compartments:
  compartment cell = 1;

  // Species:
  species E_c in cell = 60000/cell; E_c is "E(c)";
  species S_Y_0 in cell = 70000/cell; S_Y_0 is "S(Y~0)";
  species E_c_1_S_Y_0_1 in cell = 0; E_c_1_S_Y_0_1 is "E(c!1).S(Y~0!1)";
  species S_Y_P in cell = 0; S_Y_P is "S(Y~P)";

  // Parameters:
  k1 = 1e-5;
  k2 = 0.1;
  k3 = 0.1;

  // Assignment rules:
  ES := 0 + E_c_1_S_Y_0_1;
  SU := 0 + S_Y_0;
  SP := 0 + S_Y_P;

  // Reactions:
  R1: E_c + S_Y_0 => E_c_1_S_Y_0_1; k1*E_c*S_Y_0;
  R2: E_c_1_S_Y_0_1 => E_c + S_Y_0; k2*E_c_1_S_Y_0_1;
  R3: E_c_1_S_Y_0_1 => E_c + S_Y_P; k3*E_c_1_S_Y_0_1;

  // Unit definitions:
  unit substance = item;
end
